// SBML level 2 version 4

model main()

  // Compartments:
  compartment cell = 1;

  // Species:
  species Cre in cell = 0;
  species Flp in cell = 0;
  species Z00 in cell = 1/cell;
  species Z10 in cell = 0;
  species Z10X in cell = 0;
  species Z01 in cell = 0;
  species Z01X in cell = 0;
  species Z11 in cell = 0;
  species Z11Xc in cell = 0;
  species Z11Xf in cell = 0;

  // Parameters:
  alpha = 1;
  beta_p = 1;
  k1c = 1;
  km1c = 1;
  k1f = 1;
  km1f = 1;
  k2c = 1;
  km2c = 1;
  k2f = 1;
  km2f = 1;
  delta_X = 1;
  delta_D = 1;

  // Reactions:
  reaction_alpha1: -> Cre; alpha;
  reaction_beta_p1: Cre -> ; beta_p*Cre;
  reaction_alpha2: -> Flp; alpha;
  reaction_beta_p2: Flp -> ; beta_p*Flp;
  reaction_k1c: Z00 + Cre -> Z10 + Z10X; k1c*Z00*Cre;
  reaction_km1c: Z10 + Z10X -> Z00 + Cre; km1c*Z10*Z10X;
  reaction_k1f: Z00 + Flp -> Z01 + Z01X; k1f*Z00*Flp;
  reaction_km1f: Z01 + Z01X -> Z00 + Flp; km1f*Z01*Z01X;
  reaction_k2c: Z01 + Cre -> Z11 + Z11Xc; k2c*Z01*Cre;
  reaction_km2c: Z11 + Z11Xc -> Z01 + Cre; km2c*Z11*Z11Xc;
  reaction_k2f: Z10 + Flp -> Z11 + Z11Xf; k2f*Z10*Flp;
  reaction_km2f: Z11 + Z11Xf -> Z10 + Flp; km2f*Z11*Z11Xf;
  reaction_delta_D: Z00 -> ; delta_D*Z00;
  reaction_delta_X1: Z10X -> ; delta_X*Z10X;
  reaction_delta_X2: Z01X -> ; delta_X*Z01X;
  reaction_delta_X3: Z11Xc -> ; delta_X*Z11Xc;
  reaction_delta_X4: Z11Xf -> ; delta_X*Z11Xf;
end
